# LAMMPS Input Script: Deformation with NVT Simulation
# lmp -in lammps.in -var struc ${s} -var T ${t} -var P ${P}

shell mkdir self_output
shell mkdir self_structures
shell mkdir self_output/${struc}_${T}
shell mkdir self_structures/${struc}_${T}

# Initialization
units           real                    # Units in real (angstroms, femtoseconds, kcal/mol)
atom_style      full                    # Atom style for full molecular systems
boundary        p p p                   # Periodic boundary conditions in all directions

# Define force field parameters
# pair_style      lj/cut 15.0  # Lennard-Jones and long-range Coulomb interactions
pair_style      lj/cut/coul/long 14.0 12.0  # Lennard-Jones and long-range Coulomb interactions
bond_style      harmonic                   # Harmonic potential for bond interactions
angle_style     harmonic                   # Harmonic potential for angle interactions
dihedral_style  harmonic                   # Harmonic potential for dihedral interactions
improper_style  cvff                       # CVFF-specific improper interactions

read_data       relaxed_struc/${struc}_relax.data

kspace_style    ewald 1.0e-4
pair_modify tail yes mix arithmetic  # Ensure proper mixing rule

neighbor        2.0 bin
neigh_modify    delay 5 every 1 check yes

# Step 2: Minimize and Relax New Structure
minimize        1.0e-4 1.0e-6 1000 1000
fix             relax all npt temp ${T} ${T} 100.0 iso ${P} ${P} 1000.0
run             20000
unfix           relax

# Save Relaxed Structure
write_data      self_structures/${struc}_${T}/${struc}.data

# Step 3: Continue with Original Computation
# read_data       self_structures/${struc}_${T}/${struc}.data  # Load relaxed structure

# Step 4: Run NVT Simulation at Fixed Box Size
velocity        all create ${T} 12345 mom yes rot yes dist gaussian
fix             nvt all nvt temp ${T} ${T} 100.0

# Time Step and Run NVT
run 10000

# Step 5: Calculate Averages and Output to File
variable step equal step
variable temp equal temp
variable press equal press
variable pe equal pe
variable ke equal ke
variable etotal equal etotal
variable enthalpy equal enthalpy
variable vol equal vol
variable a equal lx
variable b equal ly
variable c equal lz

# Thermo output settings
thermo_style    custom step temp pe ke etotal enthalpy press vol lx ly lz
thermo          100  # Output every 100 steps to the screen and log file
fix thermo_output all print 100 "${step} ${temp} ${press} ${pe} ${ke} ${etotal} ${enthalpy} ${vol} ${a} ${b} ${c}" file self_output/${struc}_${T}/${struc}.txt screen no

# Time Step and Run NVT
run 50000

# Clear Fixes for Next Step
unfix nvt

# Finalization
# write_data      final_structure.data
